*Heading
** Job name: SS_Test_Equation Model name: SS
** Generated by: Abaqus/CAE 2019
*Preprint, echo=NO, model=NO, history=NO, contact=NO
**
** PARTS
**
*Part, name=Part-1
*Node
      1,         -10.,          50.,           1.
      2,           0.,          50.,           1.
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*Element, type=C3D8R
 1,  117, 2122, 2185,  100,    1,   72,   85,    4
 2, 2122, 2123, 2186, 2185,   72,   73,   84,   85
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*Nset, nset=Set-1, generate
     1,  10353,      1
*Elset, elset=Set-1, generate
    1,  6464,     1
** Section: Section-1
*Solid Section, elset=Set-1, controls=EC-1, material=Material-1
,
*End Part
**
**
** ASSEMBLY
**
*Assembly, name=Assembly
**
*Instance, name=Part-1-1, part=Part-1
*End Instance
**
*Node
      1,           0.,         100.,           1.
*Nset, nset=RP-1
 1,
*Nset, nset=Set-1, instance=Part-1-1
   39,   40,   41,   42,   43,   44
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*Elset, elset=Set-1, instance=Part-1-1
 2905, 2906, 2907, 2908, 2909, 2910
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*Nset, nset=Set-2, instance=Part-1-1
    1,    2,    3,    4,    9,   10
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*Elset, elset=Set-2, instance=Part-1-1, generate
  241,  1840,     1
*Nset, nset=Set-3
 1,
*Nset, nset=Set-RP-1, instance=Part-1-1
    1,    2,    3,    4,    9,   10
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*Elset, elset=Set-RP-1, instance=Part-1-1, generate
  241,  1840,     1
*Nset, nset=m_Set-8
 1,
*Nset, nset=t_Set-6, instance=Part-1-1
  17,  18,  19,  20,  21,  22
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*Elset, elset=t_Set-6, instance=Part-1-1
  633,  634,  635,  636,  637,  638
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*Nset, nset=_PickedSet12, internal
 1,
*Elset, elset=_s_Surf-1_S4, internal, instance=Part-1-1
 1041, 1042, 1043, 1044, 1045, 1046
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*Elset, elset=_s_Surf-1_S5, internal, instance=Part-1-1
  241,  242,  243,  244,  245,  246
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*Elset, elset=_s_Surf-1_S6, internal, instance=Part-1-1
  241,  249,  257,  265,  273,  281
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*Elset, elset=_s_Surf-1_S2, internal, instance=Part-1-1, generate
 1441,  1840,     1
*Elset, elset=_s_Surf-1_S3, internal, instance=Part-1-1, generate
 1041,  1433,     8
*Surface, type=ELEMENT, name=s_Surf-1
_s_Surf-1_S4, S4
_s_Surf-1_S5, S5
_s_Surf-1_S6, S6
_s_Surf-1_S2, S2
_s_Surf-1_S3, S3
*Elset, elset=_s_Surf-2_S4, internal, instance=Part-1-1
 1041, 1042, 1043, 1044, 1045, 1046
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*Elset, elset=_s_Surf-2_S5, internal, instance=Part-1-1
  241,  242,  243,  244,  245,  246
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*Elset, elset=_s_Surf-2_S6, internal, instance=Part-1-1
  241,  249,  257,  265,  273,  281
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*Elset, elset=_s_Surf-2_S2, internal, instance=Part-1-1
  633,  634,  635,  636,  637,  638
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*Elset, elset=_s_Surf-2_S3, internal, instance=Part-1-1, generate
 1041,  1433,     8
*Surface, type=ELEMENT, name=s_Surf-2
_s_Surf-2_S4, S4
_s_Surf-2_S5, S5
_s_Surf-2_S6, S6
_s_Surf-2_S2, S2
_s_Surf-2_S3, S3
*Elset, elset=_s_Surf-3_S2, internal, instance=Part-1-1
  633,  634,  635,  636,  637,  638
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*Elset, elset=_s_Surf-3_S5, internal, instance=Part-1-1, generate
 1833,  1840,     1
*Surface, type=ELEMENT, name=s_Surf-3
_s_Surf-3_S2, S2
_s_Surf-3_S5, S5
*Elset, elset=_s_Surf-4_S4, internal, instance=Part-1-1
 1041, 1042, 1043, 1044, 1045, 1046
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*Elset, elset=_s_Surf-4_S5, internal, instance=Part-1-1
  241,  242,  243,  244,  245,  246
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*Elset, elset=_s_Surf-4_S6, internal, instance=Part-1-1
  241,  249,  257,  265,  273,  281
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*Elset, elset=_s_Surf-4_S2, internal, instance=Part-1-1
  633,  634,  635,  636,  637,  638
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*Elset, elset=_s_Surf-4_S3, internal, instance=Part-1-1, generate
 1041,  1433,     8
*Surface, type=ELEMENT, name=s_Surf-4
_s_Surf-4_S4, S4
_s_Surf-4_S5, S5
_s_Surf-4_S6, S6
_s_Surf-4_S2, S2
_s_Surf-4_S3, S3
** Constraint: Constraint-1
*Equation
2
Set-RP-1, 2, 1.
RP-1, 2, -1.
*End Assembly
**
** ELEMENT CONTROLS
**
*Section Controls, name=EC-1, ELEMENT DELETION=YES
1., 1., 1.
*Amplitude, name=Amp-1
           0.01,            0.01,            0.02,            0.02,            0.03,            0.03,            0.04,            0.04
           0.05,            0.05,            0.06,            0.06,            0.07,            0.07,            0.08,            0.08
           0.09,            0.09,             0.1,             0.1,            0.11,            0.11,            0.12,            0.12
           0.13,            0.13,            0.14,            0.14,            0.15,            0.15,            0.16,            0.16
           0.17,            0.17,            0.18,            0.18,            0.19,            0.19,             0.2,             0.2
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           0.97,            0.97,            0.98,            0.98,            0.99,            0.99,              1.,              1.
**
** MATERIALS
**
*Material, name=Material-1
*Damage Initiation, criterion=DUCTILE
 0.15965, 0.33,   0.
*Damage Evolution, type=ENERGY
 50.6121,
*Density
 7.8e-06,
*Elastic
155281., 0.3
*Plastic
 405.298,        0.
 419.766, 0.0117267
 432.167, 0.0142969
 444.568,  0.016117
 454.902, 0.0187005
 465.236, 0.0205239
 477.637,  0.023094
 490.038, 0.0252842
 500.372, 0.0278676
 510.706, 0.0308311
  521.04, 0.0334145
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 494.171,  0.241008
** ----------------------------------------------------------------
**
** STEP: Step-1
**
*Step, name=Step-1, nlgeom=YES
*Dynamic, Explicit
, 1.
*Bulk Viscosity
0.06, 1.2
**
** BOUNDARY CONDITIONS
**
** Name: BC-1 Type: Displacement/Rotation
*Boundary
Set-1, 1, 1
Set-1, 2, 2
Set-1, 3, 3
** Name: BC-2 Type: Displacement/Rotation
*Boundary
Set-2, 1, 1
Set-2, 2, 2
** Name: BC-3 Type: Displacement/Rotation
*Boundary, amplitude=Amp-1
Set-3, 2, 2, 30.
**
** OUTPUT REQUESTS
**
*Restart, write, number interval=1, time marks=NO
**
** FIELD OUTPUT: F-Output-1
**
*Output, field, time interval=0.01
*Node Output
A, RF, U, V
*Element Output, directions=YES
EVF, LE, PE, PEEQ, PEEQVAVG, PEVAVG, S, STATUS, SVAVG
*Contact Output
CSTRESS,
**
** HISTORY OUTPUT: H-Output-1
**
*Output, history, variable=PRESELECT
*End Step
